*HEADING
Unit cube: unit x-load, E=1000, nu=0.3. PARDISO linear static smoke.
*NODE
1,0,0,0
2,1,0,0
3,1,1,0
4,0,1,0
5,0,0,1
6,1,0,1
7,1,1,1
8,0,1,1
*ELEMENT,TYPE=C3D8,ELSET=SOLID
1,1,2,3,4,5,6,7,8
*MATERIAL,NAME=STEEL
*ELASTIC
1000,0.3
*SOLID SECTION,ELSET=SOLID,MATERIAL=STEEL
*NSET,NSET=FIXED
1,4,5,8
*NSET,NSET=LOADED
2,3,6,7
*BOUNDARY
FIXED,1,3
*STEP
*STATIC,SOLVER=PARDISO
*CLOAD
LOADED,1,0.25
*NODE PRINT,NSET=LOADED
U
*NODE FILE
U
*EL FILE
S
*END STEP
